OpenVSP model (file version 5), 2 components.
Geometry view with OpenVSP parameter names; values to 6 digits, angles in degrees, lengths in the model's unit.
Overall bounding box: X_Min=0 X_Len=31.0166 Y_Min=-25.9636 Y_Len=51.9272 Z_Min=-2.25559 Z_Len=6.5694

Wing "Wing"
  location (X Y Z) 0 0 0, rotation 0 0 0
  symmetric about XZ
  bounding box size 31.0166 51.9272 4.67822
  totals: TotalSpan=52 TotalProjectedSpan=51.7263 TotalChord=14.0623 TotalArea=509.869 TotalAR=5.24764
  root: chord 30, twist 0, NACA 4-series Camber=0 CamberLoc=0.2 ThickChord=0.15
  sections:
    n  Span  Root_Chord  Tip_Chord  Area     Sweep  Sweep_Location  Dihedral  Twist  Twist_Location  tip airfoil
    1  5     30          20.1869    125.467  63     0               0         0      0.25            NACA 4-series Camber=0 CamberLoc=0.165714 ThickChord=0.16
    2  5     20.1869     6          65.4674  58     0               10        0      0.25            airfoil file "Boeing BAC-XXX"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 BaseThickChord=0.113362 ThickChord=0.14
    3  16    6           2          64       35     0               5         -2.5   0.25            airfoil file "Boeing BAC-XXX"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 BaseThickChord=0.113362 ThickChord=0.12

Wing "Tail"
  location (X Y Z) 24 4.5 0, rotation 0 0 0
  symmetric about XZ
  bounding box size 5.27595 12.2725 4.39593
  totals: TotalSpan=9 TotalProjectedSpan=3.07818 TotalChord=2.75 TotalArea=24.75 TotalAR=0.382836
  root: chord 4, twist 0, NACA 4-series Camber=0 CamberLoc=0.2 ThickChord=0.12
  sections:
    n  Span  Root_Chord  Tip_Chord  Area    Sweep  Sweep_Location  Dihedral  Twist  Twist_Location  tip airfoil
    1  4.5   4           1.5        12.375  40     0               70        0      0.25            as above

VSPAERO settings: Sref=623.742 bref=54 cref=15.227 Xcg=0 Ycg=0 Zcg=0 AlphaStart=1 AlphaEnd=10 AlphaNpts=3 BetaStart=0 BetaEnd=0 BetaNpts=1 MachStart=0.75 MachEnd=0 MachNpts=1 ReCref=1e+07 Vinf=100 Rho=0.002377
